units			lj
comm_modify		cutoff 8 vel yes
atom_style		angle
pair_style		dpd 1 1 22445
neighbor		5 bin
neigh_modify		every 1 delay 0 check yes one 3000

timestep		0.04

read_data		data.txt

bond_style		harmonic
bond_coeff		1 100 0.7

angle_style		harmonic
angle_coeff		1 6 180
angle_coeff		2 3 120
angle_coeff		3 4.5 120

pair_style		dpd 1 1 696969

velocity		all create 1 6969
pair_coeff		1 1 25 4.5 1
pair_coeff		1 2 25 4.5 1
pair_coeff		1 3 100 4.5 1
pair_coeff		2 2 25 4.5 1
pair_coeff		2 3 100 4.5 1
pair_coeff		3 3 25 4.5 1

fix			1 all nvt temp 1 1 4
group		polymer type 2 3

run			10000

reset_timestep		0
thermo 			1000
thermo_style		custom step temp press density

compute		press all pressure thermo_temp
variable	pressxx equal pxx
variable	pressyy equal pyy
variable	presszz equal pzz
variable	pressxy equal pxy
variable	pressxz equal pxz
variable	pressyz equal pyz
fix			pressure_output all ave/time 50 200 10000 v_pressxx v_pressyy v_presszz v_pressxy v_pressxz v_pressyz file pressure.txt

dump 			myDump polymer atom 1000 dump.polymeronly
dump			allparticles all atom 20000 dump.allparticles

run			250000
